# Original location: <PROJECT_ROOT>/in.amine_polymers
# mpirun -np 6 ../lammps/build/lmp -in in.amine_polymers

print "Starting in.amine_polymers"

# python post_force_callback here """
# from lammps import lammps

# def post_force_callback(lammps_ptr, vflag):
#     lmp = lammps(ptr=lammps_ptr)
#     # access LAMMPS state using Python interface
# """

# simulation parameters
units lj    #  Lennard-Jones units, essentially unitless
dimension 3
boundary p p p
atom_style bond
log logs/log.amine_polymers

variable N equal 1
# variable N equal 10
variable BOX_SIZE equal 40
# variable patch_bond_r0 equal 0.9  # A type
variable patch_bond_r0 equal 0.45  # C type
# variable patch_gauss_B_width equal 13.8504255125 # A type
variable patch_gauss_B_width equal 2.6315789474 # C type
variable patch_gauss_A_strength equal 50 # strength of Gaussian attraction between amine patches
# variable tau equal 10 # number tof timesteps before rev. bond processing, too high --> inaccurate

# initial configuration
region box block 0 ${BOX_SIZE} 0 ${BOX_SIZE} 0 ${BOX_SIZE}
create_box 2 box bond/types 2 extra/bond/per/atom 4 extra/special/per/atom 20

mass 1 1.0 # backbone + dummy mass
mass 2 1.0 # patch mass

molecule polymer data/polymer.molecule

# bond potentials (harmonic)
bond_style harmonic
bond_coeff 1 50.0 1.0 # k, r0 # backbone stiffness
# k is derived from Raffaeilli and Ellenbroek, Soft Matter 2021
# "...polymer backbones have a stiffness of 50e/b^2..."
bond_coeff 2 1000 ${patch_bond_r0} # stiff spring on patches
# NOTE: THIS IS WHERE A/C DIFFERENCE IS (0.9 vs 0.45)

# interatomic potentials (non-bonded)
pair_style hybrid/overlay lj/cut 1.4592006628 gauss 2.0 # cutoff for both at 2.0
pair_coeff 1 1 lj/cut 1.0 1.3  # WCA between backbone beads
pair_coeff 1 2 lj/cut 1.0 1.3  # WCA between backbone and amine patches
pair_coeff 2 2 lj/cut 0.0 1.3 # no WCA between amine patches
pair_modify shift yes # shift to zero at cutoff
pair_coeff 2 2 gauss ${patch_gauss_A_strength} ${patch_gauss_B_width} 2.0 # Gaussian attraction between amine patches

create_atoms 0 random $N 12345 box mol polymer 12345

# group definitions
group monomer type 1
group amine type 2

write_data data/data.replicated_particles # for visualization in OVITO

# neighbor list (not too sure why we need this)
neighbor 0.3 bin
neigh_modify every 1 delay 0 check yes

# Energy minimization to relax overlaps (is this necessary?)
min_style cg             # conjugate gradient (good default)
minimize 1.0e-6 1.0e-8 10000 100000
reset_timestep 0

# fix pf all python/invoke ${tau} post_force post_force_callback


# initial velocities for equilibration
timestep 0.005 # could be 0.001, Raffaeilli and Ellenbroek, Soft Matter 2021
velocity all create 1.0 1 # initial temperature 1.0, random seed 1
fix 1 all nvt temp 1.0 1.0 $(100.0*dt) # NVT ensemble, temp 1.0, damping parameter $(100.0*dt)
print "damping coefficient is $(100.0*dt)"

# equilibriation
dump 2 all atom 10 data/dump.lammpstrj
# thermo 100
# run 10000

# run
dump aminepos amine custom 10 data/amine_positions.lammpstrj id type x y z
timestep 0.005
# compute 1 1 pressure NULL # only compute pressure for type 1 atoms (monomers)
fix 2 all ave/time 1 1 10 c_thermo_press[4] file logs/baseline_press.dat # save p_xy to file every 10 timesteps
thermo_style custom step temp epair emol etotal press pxy
thermo 100
run 1000000

print "Ending in.amine_polymers"
